// COMSOL Multiphysics 6.0.0.318 model "PVDFinFILM.mph"
// Outline of the model tree

Parameters
  c_d_0 = ((1-kab)*wtP/MP)/((1-kab)*(wtP/rhoP)+(wtN/rhoN))
  phi_s0 = ((wtS/rhoS)+(kab*wtP/rhoP))/((wtS/rhoS)+(wtP/rhoP)+(wtN/rhoN))  // 固相体积分数
  phi_p0 = (kab*wtP/rhoP)/((wtS/rhoS)+(wtP/rhoP)+(wtN/rhoN))  // 吸附体积分数
  phi_l0 = 1-phi_s0  // 液相体积分数
  phi_P0 = (wtP/rhoP)/((wtS/rhoS)+(wtP/rhoP)+(wtN/rhoN))
  h_0 = 150[um]  // 初始膜厚
  h_k = 0.4
  t_tot = 36.66[s]/(1-kg)  // 时长
  t_dt = t_tot/100  // 步长
  Rg = 8.314 [J/mol/K]
  rhoS = 2250[kg/m^3]
  rhoP = 1780[kg/m^3]
  rhoN = 1028[kg/m^3]
  wtS = 0.47
  wtP = 0.03
  wtN = 0.5
  MP = 1e6 [g/mol]
  MN = 99.13[g/mol]
  kab = 0.5
  Kvap = 0.028[m/s]
  kB = 1.38e-23[J/K]
  rc = 2.55e-9 [m]
  Dtest = kB*(TT)/6/pi/miu/rc
  TT = (273.15+76.5)[K]
  miu = 0.8618 [mPa*s]
  Tt = 70[K]
  kg = 0
  ktau = 0.4
  kk1 = 0
  kk2 = -20
  t_h = 85
  xmin = 1
  tmax = 100

Functions
  int1: Interpolation "Pstar" | table = {{20, 40}, {40, 160}, {50, 320}, {60, 530}, {78, 1330}, {95, 2670}, {100, 3200}, {135, 13330}, {150, 21600}}; interp = piecewisecubic; fununit = Pa; argunit = K
  int2: Interpolation "TempC" | table = {{0, 80}, {t_tot/2, 80}, {t_tot, 60}}; interp = cubicspline; fununit = K; argunit = s
  int3: Interpolation "miu" | table = {{25, 1.656}, {40, 1.322}, {50, 1.175}, {60, 1.035}, {70, 0.921}}; interp = piecewisecubic; extrap = interior; fununit = mPa*s; argunit = K
  an1: Analytic "解析 1" | expr = 80+kk1*x+kk2*x^2; fununit = K; argunit = 1
  int4: Interpolation "Tiime" | table = {{60, 114}, {70, 70}, {80, 45}}; interp = cubicspline
  step1: Step "阶跃 1" | location = t_tot*ktau; from = t_h; to = 140-t_h; smooth = 0.001*t_tot/2
  int5: Interpolation "插值 5" | table = {{0.8, 44.97}, {0.9, 47.91}, {1, 51.25}}; extrap = interior

Variables
  var1 "变量 1"
    h_n = maxop1(x)
    phi_s = phi_s0*h_0/h_n
    phi_l = 1-phi_s
    fo_s = -gama*phi_s0*h_0*x/h_n/h_n
    fo_l = -fo_s
    Pstar = int1(temp)
    Gvap = Kvap*Cdelta*MN
    Cdelta = (Pstar-Pg)/(Rg*TEMP)
    temp = 85[K]  // int2(t) or an1(t)
    TEMP = temp+273.15 [K]
    KK = (1-phic)^6.55
    ZZ = 0.785/((0.785-phic)^2)
    Dcc = Dc0*KK*ZZ
    mium = int3(temp)
    phic = c*MP/rhoP
    Pg = Pstar*kg
    Dc0 = kB*TEMP/6/pi/mium/rc
    gama = Gvap/rhoN

Couplings
  intop1: Integration "积分 1" on domains 1
  aveop1: Average "平均值 1" on domains 1
  maxop1: Maximum "最大值 1" on domains 1
  minop1: Minimum "最小值 1" on domains 1

Geometry
  geom1 "几何 1" (1D, length unit µm)
    i1: Interval "线段间隔 1" | coord = {0, h_0}
    fin: Finalize "形成联合体"

Materials
  mat1: Common "Water, liquid" on all domains
    def "Basic"
      thermalexpansioncoefficient = alpha_p(T)
      bulkviscosity = muB(T)
      dynamicviscosity = eta(T)
      ratioofspecificheat = gamma_w(T)
      electricconductivity = 5.5e-6[S/m]
      heatcapacity = Cp(T)
      density = rho(T)
      thermalconductivity = k(T)
      soundspeed = cs(T)
      eta: Piecewise
        arg = T
        pieces = 
          {273.15, 413.15, 1.3799566804-0.021224019151*T^1+1.3604562827E-4*T^2-4.6454090319E-7*T^3+8.9042735735E-10*T^4-9.0790692686E-13*T^5+3.8457331488E-16*T^6}
          {413.15, 553.75, 0.00401235783-2.10746715E-5*T^1+3.85772275E-8*T^2-2.39730284E-11*T^3}
        argunit = K
        fununit = Pa*s
      Cp: Piecewise | arg = T; pieces = {273.15, 553.75, 12010.1471-80.4072879*T^1+0.309866854*T^2-5.38186884E-4*T^3+3.62536437E-7*T^4}; argunit = K; fununit = J/(kg*K)
      rho: Piecewise
        arg = T
        smooth = contd1
        pieces = 
          {273.15, 293.15, 6.3092789034e-05*T^3-0.0603676398829*T^2+18.9229382407066*T-950.704055329848}
          {293.15, 373.15, 1.0335053319e-05*T^3-0.0133950656345*T^2+4.96928883266*T+432.257114008512}
        argunit = K
        fununit = kg/m^3
      k: Piecewise | arg = T; pieces = {273.15, 553.75, -0.869083936+0.00894880345*T^1-1.58366345E-5*T^2+7.97543259E-9*T^3}; argunit = K; fununit = W/(m*K)
      cs: Interpolation | table = {{273, 1403}, {278, 1427}, {283, 1447}, {293, 1481}, {303, 1507}, {313, 1526}, {323, 1541}, {333, 1552}, {343, 1555}, {353, 1555}, {363, 1550}, {373, 1543}}; interp = piecewisecubic; fununit = m/s; argunit = K
      an1: Analytic | funcname = alpha_p; expr = -1/rho(T)*d(rho(T),T); args = T; fununit = 1/K; argunit = K
      an2: Analytic | funcname = gamma_w; expr = 1+(T/Cp(T))*(alpha_p(T)*cs(T))^2; args = T; fununit = 1; argunit = K
      an3: Analytic | funcname = muB; expr = 2.79*eta(T); args = T; fununit = Pa*s; argunit = K

Physics
  tds: DilutedSpecies "稀物质传递" on domains 1
    dependent variable c
    TransportMechanism.Convection = 1
    TransportMechanism.MassTransferInPorousMedia = 1
    cdm1: ConvectionDiffusionMigration "传递属性 1" (default) | u = {fo_l, 0, 0}; D_c = Dcc; D_c2 = 1.14e-10[m^2/s]
    nflx1: NoFlux "无通量 1" (default) | IncludeConvection = 1
    init1: init "初始值 1" (default) | initc = c_d_0
    porous1: PorousMedium "多孔介质 1" on domains 1
      fluid1: FluidPorousMedium "流体 1" (default)
        u = {fo_l, 0, 0}
        DF_c = Dcc
        FluidDiffusivityModelType = MillingtonAndQuirkModel
      pm1: PorousMatrixPorousMedium "多孔基体 1" (default) | poro_mat = userdef; poro = phi_l
    fl1: FluxBoundary "通量 1" on boundaries 2 | species = 1; J0 = (c_d_0*h_0*phi_l0-intop1(c*phi_l))/1e-2[s]
  dg: DeformedGeometry "变形几何" on all domains
    fix1: FixedMesh "固定网格 1" (default)
    disp1: PrescribedMeshDisplacement "指定网格位移 1" (default)
    free1: FreeDeformation "自由变形 1" on domains 1
    znmd1: ZeroNormalMeshDisplacement "零法向网格位移 1" on boundaries 1
    pnmv1: PrescribedNormalMeshVelocity "指定法向网格速度 1" on boundaries 2 | vn = -gama

Mesh
  mesh1 "网格 1"
    size: MeshSizeDefault "大小" | table = cfd; hauto = 1
    edg1: Edge "边 1" on all domains
      size1: Size "大小 1" on domains 1 | table = cfd; hmax = xmin; hgrad = 10; hauto = 1; custom = on

Studies
  std1 "研究 1"
    time: Transient "瞬态" | tlist = range(0,t_dt,t_tot)

Datasets
  dset1: Solution | solution = none
  dset36: Solution | solution = none
  dset37: Solution | solution = none
  dset38: Solution | solution = none
  dset41: Solution | solution = none
  dset42: Solution | solution = none
  dset43: Solution | solution = none
  dset45: Solution | solution = none
  dset46: Solution | solution = none
  dset47: Solution | solution = none
  dset48: Solution | solution = none
  dset51: Solution | solution = none
  dset53: Solution | solution = none
  dset54: Solution | solution = none
  dset55: Solution | solution = none
  dset56: Solution | solution = none
  dset57: Solution | solution = none
  dset58: Solution | solution = none
  dset59: Solution | solution = none
  dset60: Solution | solution = none
  dset61: Solution | solution = none
  dset62: Solution | solution = none
  dset63: Solution | solution = none
  dset64: Solution | solution = none
  dset65: Solution | solution = none
  dset66: Solution | solution = none
  dset67: Solution | solution = none
  dset68: Solution | solution = none
  dset69: Solution | solution = none
  dset70: Solution | solution = none
  dset71: Solution | solution = none
  dset72: Solution | solution = none
  dset73: Solution | solution = none
  dset74: Solution | solution = none
  dset75: Solution | solution = none
  dset76: Solution | solution = none
  dset77: Solution | solution = none
  dset78: Solution | solution = none
  dset79: Solution | solution = none
  dset80: Solution | solution = none
  dset81: Solution | solution = none
  dset82: Solution | solution = none
  dset83: Solution | solution = none
  dset84: Solution | solution = none
  dset85: Solution | solution = none
  dset86: Solution | solution = none
  dset87: Solution | solution = none
  dset88: Solution | solution = none
  dset89: Solution | solution = none
  dset90: Solution | solution = none
  dset91: Solution | solution = none
  dset92: Solution | solution = none

Plots
  pg1: PlotGroup1D "一维绘图组 1" | data = dset1